// SBML level 3 version 2

model biocrnpyler_849870()
  // model units - substance: mole, time: second, volume: litre, area: square_metre, length: metre, extent: mole

  // Compartments:
  compartment default = 1e-6;

  // Species:
  species Z in default = 0;
  species complex_X_2x_Z_ in default = 0;
  species X in default = 0;
  species complex_X_Y_2x_Z_ in default = 0;
  species Y in default = 0;
  species complex_X_2x_ in default = 0;
  species complex_Y_2x_Z_ in default = 0;
  species complex_Y_2x_ in default = 0;
  species complex_X_2x_Y_Z_ in default = 0;

  // Parameters:
  kb__ = 1;
  ku__ = 5e-7;

  // Reactions:
  r0: 2 X => complex_X_2x_; kb__*X^2;
  r0rev: complex_X_2x_ => 2 X; ku__*complex_X_2x_;
  r1: Z + complex_X_2x_ => complex_X_2x_Z_; kb__*Z*complex_X_2x_;
  r1rev: complex_X_2x_Z_ => Z + complex_X_2x_; ku__*complex_X_2x_Z_;
  r2: 2 Y => complex_Y_2x_; kb__*Y^2;
  r2rev: complex_Y_2x_ => 2 Y; ku__*complex_Y_2x_;
  r3: Z + complex_Y_2x_ => complex_Y_2x_Z_; kb__*Z*complex_Y_2x_;
  r3rev: complex_Y_2x_Z_ => Z + complex_Y_2x_; ku__*complex_Y_2x_Z_;
  r4: Y + complex_X_2x_Z_ => complex_X_2x_Y_Z_; kb__*Y*complex_X_2x_Z_;
  r4rev: complex_X_2x_Y_Z_ => Y + complex_X_2x_Z_; ku__*complex_X_2x_Y_Z_;
  r5: X + complex_Y_2x_Z_ => complex_X_Y_2x_Z_; kb__*X*complex_Y_2x_Z_;
  r5rev: complex_X_Y_2x_Z_ => X + complex_Y_2x_Z_; ku__*complex_X_Y_2x_Z_;

  // Unit definitions:
  unit square_metre = metre^2;
end
